$PROB Analysis of 1 compartment oral model for theophyline data
$INPUT ID BWT AMT TIME DV MDV

$DATA THEO.DAT IGNORE=#
$SUBS ADVAN2 TRANS2
$PK
TVKA=THETA(1)
TVCL=THETA(2)
TVV=THETA(3)

CL=TVCL*EXP(ETA(2))
V=TVV*EXP(ETA(3))
K=CL/V
KA=TVKA*EXP(ETA(1))
S2=V

$ERROR
IPRED = F
IRES = DV - F
W = F
IF (W.EQ.0) W=1
IWRES = IRES / W
Y=F+EPS(1)
$THETA (0,1.5) (0,0.04) (0,0.4)
$OMEGA  0.8 0.08 0.02
$SIGMA 0.5

$ESTIMATION SIGDIGITS=3 POSTHOC METHOD=CONDITIONAL
$COVARIANCE
$SCATTERPLOT DV VS PRED
$SCATTERPLOT RES VS PRED
$TAB ID CL V K KA ONEHEADER NOPRINT FILE=patab0
$TAB ID TIME IPRED IRES IWRES NOPRINT ONEHEADER FILE=sdtab0
$TAB ID BWT FILE=cotab0
