;generated by MDL2NMTRAN v.5.1.4


$PROB WARFARIN PK
;O'Reilly RA, Aggeler PM, Leong LS. Studies of the coumarin anticoagulant
;drugs: The pharmacodynamics of warfarin in man.
;Journal of Clinical Investigation 1963;42(10):1542-1551
;O'Reilly RA, Aggeler PM. Studies on coumarin anticoagulant drugs
;Initiation of warfarin therapy without a loading dose.
;Circulation 1968;38:169-177

$INPUT
ID TIME WT AGE SEX AMT DVID DV MDV

$DATA warfarin_conc_pca.csv
	IGNORE=#
IGNORE (DVID.EQ.2)


$SUBR
ADVAN2 TRANS2


$PK
GRPCL = THETA(1)*(WT/70)**0.75
GRPV = THETA(2)*WT/70
GRPKA = THETA(3)
GRPLG = THETA(4)
CL = GRPCL*EXP(ETA(1))
V = GRPV*EXP(ETA(2))
KA = GRPKA*EXP(ETA(3))
ALAG1 = GRPLG*EXP(ETA(4))
S2 = V

$ERROR
CONC = A(2)/V

IPRED=F
IF(F.GT.0) IPRED=F

IRES = DV - IPRED

W = THETA(5)+THETA(6)*CONC
Y = IPRED + W*EPS(1)

$THETA
(0.001, 0.1, INF) ; POP_CL
(0.001, 8, INF) ; POP_V
(0.001, 2, INF) ; POP_KA
(0.001, 1, INF) ; POP_TLAG

(0.01) ; RUV_ADD
(0.05) ; RUV_PROP

$OMEGA BLOCK (2)
0.1 ; PPV_CL
0.01 0.1 ; PPV_V

$OMEGA
0.1 ; PPV_KA
0.1 ; PPV_TLAG

$SIGMA
1.0 FIX

$EST METHOD=COND INTER
MAX=9990 SIG=3 NOABORT ;PRINT=1
$COV

;$TABLE
;ID TIME WT SEX AGE CL V KA ALAG1 DVID Y
;ONEHEADER NOPRINT FILE=warfarin_PK_CONC_task.fit

; Changed Table file statements to conform to Xpose expected input
$TABLE ID TIME IPRED IRES RES PRED WRES NOPRINT ONEHEADER FILE=sdtab0
$TABLE ID CL V KA ALAG1 ETA(1) ETA(2) ETA(3) ETA(4) NOPRINT NOAPPEND ONEHEADER FILE=patab0
$TABLE ID AGE WT NOPRINT NOAPPEND ONEHEADER FILE=cotab0
$TABLE ID SEX NOPRINT NOAPPEND ONEHEADER FILE=catab0
