$PROB System Test 2
$INPUT SID SEX AGE RACE HT SMOK HCTZ PROP CON AMT WT TIME SECR
       DV DROP=RATE EVID SS II ID OCC
$DATA Data1 IGNORE=@
$SUBROUTINE ADVAN2 TRANS2
$PK
    TVCL=THETA(1)
    TVV=THETA(2)
    TVKA=THETA(3)
    CL=TVCL*EXP(ETA(1))
    V =TVV *EXP(ETA(2))
    KA=TVKA*EXP(ETA(3))
    S2=V
$THETA 19.6 84.6 1.66
$OMEGA .164 .165
$OMEGA 1.30
$ERROR
    IPRED = F
    IRES  = DV - F
    W     = F
    IF(W.EQ.0) W = 1
    IWRES = IRES/W
    Y     = IPRED + W*EPS(1)

$SIGMA  0.0202
$SIM (20050213) SUBPROBLEMS=5
$EST NOABORT POSTHOC
$TABLE ID  TIME IPRED IWRES
       NOPRINT ONEHEADER FILE=XXXX
