$PROB READ THE MODEL SPECIFICATION FILE
$DATA DATA.csv
$INPUT ID DOSE WT TIME DV
$SUBROUTINE PRIOR=prior
$PRED
;
; THETA(1)=MEAN ABSORPTION RATE CONSTANT - MEAN ELIM. RATE CONSTANT (l/HR)
; THETA(2)=MEAN ELIM. RATE CONSTANT (1/HR)
; THETA(3)=SLOPE OF CLEARANCE VS WEIGHT RELATIONSHIP (LITERS/HR/KG)
; DOSE=WEIGHT-ADJUSTED DOSE (MG/KG)
;
IF (NEWIND.NE.2) THEN
AMT=DOSE*WT
W=WT
ENDIF
T0=THETA(1)*EXP(ETA(1))
T2=THETA(2)*EXP(ETA(2))
T1=T2+T0
T3=THETA(3)*W*EXP(ETA(3))
A=EXP(-T2*TIME)
B=EXP(-T1*TIME)
C=T1-T2
D=A-B
E=T3*C
Y=AMT*T1*T2/E*D+EPS(2)
$MSFI msf1 ONLYREAD
$PROB POPULATION DATA WITH PRIOR ON THETA AND OMEGA
$INPUT ID DOSE WT TIME DV
$DATA data
$THETA (0,4,5) (0,.09,.5) (.004,.01,.9)
$OMEGA BLOCK (3) .7 .04 .05 .02 .06 .08
$SIGMA .4 FIX .5
$SIM (547676) ONLY
