$PROB 1003 phase1 2 CMT like 1002 but no eta on Q/v3 and no + err
$INPUT C ID TIME SEQ=DROP EVID AMT DV
$DATA   ../../data/derived/phase1.csv IGNORE=C
$SUBROUTINE ADVAN4 TRANS4
$PK
CL=THETA(1)*EXP(ETA(1))
V2 =THETA(2)*EXP(ETA(2))
KA=THETA(3)*EXP(ETA(3))
Q  =THETA(4);*EXP(ETA(4))
V3=THETA(5); *EXP(ETA(5))
S2=V2
$ERROR
Y=F*EXP(ERR(1)); + ERR(2)
IPRE=F
$THETA 10 ; CL
10 ; V
0.2 ; KA
10 ; Q
10 ; V3
$OMEGA 0.09  ; 0.09 0.09
0.09  ; 0.09 0.09
0.09  ; 0.09 0.09
$SIGMA 0.09  ; 0.1
$ESTIMATION MAXEVAL=9999 PRINT=5 NOABORT METHOD=1 INTER MSFO=./1003.msf
$COV PRINT=E

$TABLE ID AMT TIME EVID PRED IPRE CWRES APPEND ONEHEADER NOPRINT FILE=./1003.tab
$TABLE ID TIME CL Q V2 V3 KA ETA1 ETA2 ETA3 APPEND ONEHEADER NOPRINT FILE=./1003par.tab
